// SBML level 2 version 1

model O_Linked_Glycosylation_Reaction_Network()

  // Compartments:
  compartment TransGolgi_Compartment = 1;

  // Species:
  species S2 in TransGolgi_Compartment = 0; S2 is "Galbeta13_x_Galbeta14GlcNAcbeta16_x_GalNAc0";
  species S1 in TransGolgi_Compartment = 5739/TransGolgi_Compartment; S1 is "Galbeta13_x_GlcNAcbeta16_x_GalNAc0";
  species S5 in TransGolgi_Compartment = 0; S5 is "NeuAcalpha23Galbeta13_x_Galbeta14GlcNAcbeta16_x_GalNAc0";
  species S7 in TransGolgi_Compartment = 0; S7 is "NeuAcalpha23Galbeta13_x_NeuAcalpha23Galbeta14GlcNAcbeta16_x_GalNAc0";
  species S10 in TransGolgi_Compartment = 0; S10 is "Galbeta13_x_NeuAcalpha23Galbeta14GlcNAcbeta13Galbeta14GlcNAcbeta16_x_GalNAc0";
  species S8 in TransGolgi_Compartment = 0; S8 is "Galbeta13_x_Galbeta14GlcNAcbeta13Galbeta14GlcNAcbeta16_x_GalNAc0";
  species S6 in TransGolgi_Compartment = 0; S6 is "Galbeta13_x_GlcNAcbeta13Galbeta14GlcNAcbeta16_x_GalNAc0";
  species S11 in TransGolgi_Compartment = 0; S11 is "NeuAcalpha23Galbeta13_x_Galbeta14GlcNAcbeta13Galbeta14GlcNAcbeta16_x_GalNAc0";
  species S14 in TransGolgi_Compartment = 0; S14 is "Galbeta13_x_NeuAcalpha23Galbeta14_Fucalpha13_GlcNAcbeta13Galbeta14GlcNAcbeta16_x_GalNAc0";
  species S18 in TransGolgi_Compartment = 0; S18 is "Galbeta13_x_NeuAcalpha23Galbeta14GlcNAcbeta13Galbeta14GlcNAcbeta13Galbeta14GlcNAcbeta16_x_GalNAc0";
  species S15 in TransGolgi_Compartment = 0; S15 is "Galbeta13_x_Galbeta14GlcNAcbeta13Galbeta14GlcNAcbeta13Galbeta14GlcNAcbeta16_x_GalNAc0";
  species S12 in TransGolgi_Compartment = 0; S12 is "Galbeta13_x_GlcNAcbeta13Galbeta14GlcNAcbeta13Galbeta14GlcNAcbeta16_x_GalNAc0";
  species S19 in TransGolgi_Compartment = 0; S19 is "NeuAcalpha23Galbeta13_x_Galbeta14GlcNAcbeta13Galbeta14GlcNAcbeta13Galbeta14GlcNAcbeta16_x_GalNAc0";
  species S16 in TransGolgi_Compartment = 0; S16 is "NeuAcalpha23Galbeta13_x_GlcNAcbeta13Galbeta14GlcNAcbeta13Galbeta14GlcNAcbeta16_x_GalNAc0";

  // Parameters:
  Kfbeta14GalT = 3395.06;
  Kfalpha23STIAndII = 18.01;
  Kfalpha23STIV = 17.76;
  Kfbeta13GlcNAcT = 7.88;
  Kfalpha13FTVII = 19.81;

  // Reactions:
  Reaction_1: S1 -> S2; Kfbeta14GalT*S1;
  Reaction_2: S2 -> S5; Kfalpha23STIAndII*S2;
  Reaction_3: S5 -> S7; Kfalpha23STIV*S5;
  Reaction_4: S8 -> S10; Kfalpha23STIV*S8;
  Reaction_5: S6 -> S8; Kfbeta14GalT*S6;
  Reaction_6: S2 -> S6; Kfbeta13GlcNAcT*S2;
  Reaction_7: S8 -> S11; Kfalpha23STIAndII*S8;
  Reaction_8: S10 -> S14; Kfalpha13FTVII*S10;
  Reaction_9: S15 -> S18; Kfalpha23STIV*S15;
  Reaction_10: S12 -> S15; Kfbeta14GalT*S12;
  Reaction_11: S8 -> S12; Kfbeta13GlcNAcT*S8;
  Reaction_12: S16 -> S19; Kfbeta14GalT*S16;
  Reaction_13: S15 -> S19; Kfalpha23STIAndII*S15;
  Reaction_14: S11 -> S16; Kfbeta13GlcNAcT*S11;
  Reaction_15: S12 -> S16; Kfalpha23STIAndII*S12;
end
